f(x) := e^(-x) - (x - 1)^2
a := -98
b := -90
# [plot: f(x) vs x]
y(x) := -x*e^(-x - 1) - 2*(x - 1)
f''(x) := (x^2 + x)*e^(-x - 2)
# [plot: x vs f''(x)]
# [plot: y(x) vs x]
0
n := 1 .. 10
x[1] := -96
x[n + 1] := x[n] - f(x[n])^2/(f(x[n] + f(x[n])) - f(x[n]))
