a := -3
f(x) := e^(-x) - (x - 1)^2
b := 3
# Точки для вычисления погрешности интерполяции
j := 0 .. 150
t[j] := a + (b - a)/150*j
n := [5; 10; 15; 20; 25; 30; 40; 50; 60]  # Равноотстоящие узлы
N := n[0]
i := 0 .. N
x[i] := a + (b - a)*i/N
L(t) := sum(f(x[k])*product(if(k - i, (t - x[i])/(x[k] - x[i]), 1), i = 0 .. N), k = 0 .. N)
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# Вычисление погрешности интерполяции
s[j] := |f(t[j]) - L(t[j])|
r[0] := max(s)
N := n[1]
i := 0 .. N
x[i] := a + (b - a)*i/N
L(t) := sum(f(x[k])*product(if(k - i, (t - x[i])/(x[k] - x[i]), 1), i = 0 .. N), k = 0 .. N)
s[j] := |f(t[j]) - L(t[j])|
r[1] := max(s)
N := n[2]
i := 0 .. N
x[i] := a + (b - a)*i/N
L(t) := sum(f(x[k])*product(if(k - i, (t - x[i])/(x[k] - x[i]), 1), i = 0 .. N), k = 0 .. N)
s[j] := |f(t[j]) - L(t[j])|
r[2] := max(s)
N := n[3]
i := 0 .. N
x[i] := a + (b - a)*i/N
L(t) := sum(f(x[k])*product(if(k - i, (t - x[i])/(x[k] - x[i]), 1), i = 0 .. N), k = 0 .. N)
s[j] := |f(t[j]) - L(t[j])|
r[3] := max(s)
r = [0.132139; 5.55052e-5; 3.5833e-9; 9.68114e-13]
# 2. Чебышевские узлы
N := n[0]
i := 0 .. N
v[i] := cos(π*(1 + 2*i)/(2*(N + 1)))
z[i] := (a + b)/2 + (b - a)/2*v[i]
LCH(t) := sum(f(z[k])*product(if(k - i, (t - z[i])/(z[k] - z[i]), 1), i = 0 .. N), k = 0 .. N)
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s[j] := |f(t[j]) - LCH(t[j])|
rch[0] := max(s)
N := n[1]
i := 0 .. N
v[i] := cos(π*(1 + 2*i)/(2*(N + 1)))
z[i] := (a + b)/2 + (b - a)/2*v[i]
LCH(t) := sum(f(z[k])*product(if(k - i, (t - z[i])/(z[k] - z[i]), 1), i = 0 .. N), k = 0 .. N)
s[j] := |f(t[j]) - LCH(t[j])|
rch[1] := max(s)
N := n[2]
i := 0 .. N
v[i] := cos(π*(1 + 2*i)/(2*(N + 1)))
z[i] := (a + b)/2 + (b - a)/2*v[i]
LCH(t) := sum(f(z[k])*product(if(k - i, (t - z[i])/(z[k] - z[i]), 1), i = 0 .. N), k = 0 .. N)
s[j] := |f(t[j]) - LCH(t[j])|
rch[2] := max(s)
N := n[3]
i := 0 .. N
v[i] := cos(π*(1 + 2*i)/(2*(N + 1)))
z[i] := (a + b)/2 + (b - a)/2*v[i]
LCH(t) := sum(f(z[k])*product(if(k - i, (t - z[i])/(z[k] - z[i]), 1), i = 0 .. N), k = 0 .. N)
s[j] := |f(t[j]) - LCH(t[j])|
rch[3] := max(s)
rch = [0.0651297; 6.67152e-6; 8.53113e-11; 3.10862e-15]
# Графики погрешности интерполяции
m := 0 .. 5
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# Интерполяционные сплайны
# Линейный интерполяционный сплайн
N := n[0]
i := 0 .. N
xx[i] := a + (b - a)*i/N
y[i] := f(xx[i])
LS(t) := linterp(xx, y, t)
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s[j] := |f(t[j]) - LS(t[j])|
rls[0] := max(s)
N := n[1]
i := 0 .. N
xx[i] := a + (b - a)*i/N
y[i] := f(xx[i])
LS(t) := linterp(xx, y, t)
s[j] := |f(t[j]) - LS(t[j])|
rls[1] := max(s)
N := n[2]
i := 0 .. N
xx[i] := a + (b - a)*i/N
y[i] := f(xx[i])
LS(t) := linterp(xx, y, t)
s[j] := |f(t[j]) - LS(t[j])|
rls[2] := max(s)
N := n[3]
i := 0 .. N
xx[i] := a + (b - a)*i/N
y[i] := f(xx[i])
LS(t) := linterp(xx, y, t)
s[j] := |f(t[j]) - LS(t[j])|
rls[3] := max(s)
rls = [1.70845; 0.586513; 0.289991; 0.170942]
