# Численное интегрирование
# Вариант - обощенная формула левых прямоугольников, 4 узла
a := -3
f(x) := e^(-x) - (x - 1)^2
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b := 3
I := integral(f(x), x = a .. b)
I = -3.96425
k := 1 .. 10
n[k] := 2^k
# шаг разбиения
h[k] := (b - a)/n[k]
J[k] := sum(h[k]*f(a + i*h[k]), i = 0 .. n[k] - 1)
Z[k] := |I - J[k]|
# Оценка погрешности по методу Рунге
k := 2 .. 10
R[k] := |J[k] - J[k - 1]|/3
Z[k] = [7.39978; 3.38139; 1.60032; 0.776859; 0.382559; 0.189809; 0.0945368; 0.0471764; 0.0235652]
R[k] = [2.94036; 1.33946; 0.59369; 0.274488; 0.131433; 0.06425; 0.0317575; 0.0157868; 0.0078704]
R[k - 1]/R[k] = [0; 2.19518; 2.25617; 2.1629; 2.08842; 2.04566; 2.02315; 2.01165; 2.00584]
Z[k] = [7.39978; 3.38139; 1.60032; 0.776859; 0.382559; 0.189809; 0.0945368; 0.0471764; 0.0235652]
R[k] = [2.94036; 1.33946; 0.59369; 0.274488; 0.131433; 0.06425; 0.0317575; 0.0157868; 0.0078704]
R[k - 1]/R[k] =  # no stored result
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r[k] := R[k - 1]/R[k]
# Квадатурная формула Гаусса
m := 4
j := 1 .. m
x[1] := 0.06943184
c[1] := 0.17392742
x[2] := 0.33000948
c[2] := 0.32607258
x[3] := 0.66999052
c[3] := 0.32607258
x[4] := 0.93056815
c[4] := 0.17392742
z[j] := a + (b - a)*x[j]
G := (b - a)*sum(c[j]*f(z[j]), j = 1 .. m)
G = -3.97131
|I - G| = 0.00706113
