# Решение задачи Коши для ОДУ 1-го порядка
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a := 0
X[0] := 1
F(t, u) := e^t/((e^t + 1)*u)
b := 2
# Явная разностная схема Эйлера
n := 100
h := (b - a)/n
k := 0 .. n - 1
t[k] := a + k*h
X[k + 1] := X[k] + h*F(t[k], X[k])
# [plot: X[k] vs t[k]]
Y[0] := 1
n := 2*n
h := (b - a)/n
k := 0 .. n - 1
t[k] := a + k*h
Y[k + 1] := Y[k] + h*F(t[k], Y[k])
m := 0 .. n/2
R[m] := |X[m] - Y[2*m]|
# [plot: R[m] vs X[m]]
max(R) = 0.000220619
# Разностная схема Эйлера-Коши (σ=1)
n := 150
X1[0] := 1
h := (b - a)/n
k := 0 .. n - 1
t[k] := a + k*h
X1[k + 1] := X1[k] + h/2*(F(t[k], X1[k]) + F(t[k + 1], X1[k] + h*F(t[k], X1[k])))
j := 0 .. n
s := 1
n := 150
D(t, s) := F(t, s)
W := rkfixed(s, a, b, n, D)
W[100, 1] = 1.6578
R1[j] := |X1[j] - W[j, 1]|
max(R1) = 0.000215412
R1 = [
    0; 1.63515e-10; 6.497e-10; 1.45206e-9; 2.56414e-9; 3.97956e-9; 5.69198e-9; 7.6951e-9; 9.9827e-9; 1.25486e-8
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]
# [plot: X1[k] vs t[k]]
# [plot: |X1[k] - W[k, 1]| vs t[k]]
# [plot: W[k, 1] vs k]
