# Краевая задача для ОДУ 2-го порядка
# Исходные данные
p(x) := sqrt(x^2 + 1)
q(x) := 1/(1 + x)
f(x) := e^(-x) + x
aa := 0
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bb := 2.5
μ[1] := 1
μ[2] := 2
# Разностная схема с правой разностной производной
n := 200
i := 0 .. n
h := (bb - aa)/n
x[i] := aa + i*h
i := 1 .. n - 1
b[i] := 1
a[i] := 1 - p(x[i])*h
c[i] := 2 - p(x[i])*h + q(x[i])*h^2
g[i] := -f(x[i])
α[1] := 0
β[1] := μ[1]
α[i + 1] := b[i]/(c[i] - a[i]*α[i])
β[i + 1] := (h^2*g[i] + a[i]*β[i])/(c[i] - a[i]*α[i])
i := n - 1 .. 1
y1[0] := μ[1]
y1[n] := μ[2]
y1[i] := α[i + 1]*y1[i + 1] + β[i + 1]
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i := 0 .. n
n := 2*n
i := 0 .. n
h := (bb - aa)/n
x[i] := aa + i*h
i := 1 .. n - 1
b[i] := 1
a[i] := 1 - p(x[i])*h
c[i] := 2 - p(x[i])*h + q(x[i])*h^2
g[i] := -f(x[i])
α[1] := 0
β[1] := μ[1]
α[i + 1] := b[i]/(c[i] - a[i]*α[i])
β[i + 1] := (h^2*g[i] + a[i]*β[i])/(c[i] - a[i]*α[i])
i := n - 1 .. 1
y2[0] := μ[1]
y2[n] := μ[2]
y2[i] := α[i + 1]*y2[i + 1] + β[i + 1]
# Оценка погрешности
j := 0 .. n/2
r[j] := |y1[j] - y2[2*j]|
max(r) = 0.00197463
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Given
d^2/dt^2(w(t)) + p(t)*(d/dt(w(t))) - q(t)*w(t) == f(t)
w(aa) == μ[1]
w(bb) == μ[2]
w := Odesolve(t, bb)
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