# Численное решение начально-краевой задачи линейного ДУ параболического типа 2го порядка
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L := 2
T := 1
p(x) := sqrt(x^2 + 1)
f(t, x) := sin(π*t*x)
φ(x) := x^2*(1 - x)
μ1(t) := sqrt(t^2 + 1)
μ2(t) := 0.5*t
n := 50
h := L/n
q := 0.6
γ := h^2/(2*q)
z := 0.001
m := 1/z
γ = 0.00133333
k := 0 .. m
t[k] := k*z
y[k, 0] := μ1(t[k])
y[k, m] := μ2(t[k])
i := 0 .. n
x[i] := i*h
y[0, i] := φ(x[i])
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