# Решение системы уравнений Ax = b
D := [
    1.342, 0.432, -0.599, 0.202;
    0.202, 1.342, 0.432, -0.599;
    -0.599, 0.202, 1.342, 0.432;
    0.432, -0.599, 0.202, 1.342
]
C := [0.02, 0, 0, 0; 0, 0.02, 0, 0; 0, 0, 0.02, 0; 0, 0, 0, 0.02]
b := [1.941; -0.230; -1.941; 0.230]
k := 4
A := D + k*C
A = [
    1.422, 0.432, -0.599, 0.202;
    0.202, 1.422, 0.432, -0.599;
    -0.599, 0.202, 1.422, 0.432;
    0.432, -0.599, 0.202, 1.422
]
# с помощью функции lsolve:
x := lsolve(A, b)
x = [0.960922; -0.0044473; -0.960922; 0.0044473]
# итерационный метод Зейделя:
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m := 0 .. 16
E := [1, 0, 0, 0; 0, 1, 0, 0; 0, 0, 1, 0; 0, 0, 0, 1]
t := 16
k := 0 .. t
B[m] := D + A^-1
S[0] := E - B[0]^-1*A
g[0] := B[0]^-1*b
S[k] := E - B[k]^-1*A
g[k] := B[k]^-1*b
y[:, 0] := b
y[:, k + 1] := g[k] + S[k]*y[:, k]
y[:, t + 1] = [0.960922; -0.0044473; -0.960922; 0.0044473]
x = [0.960922; -0.0044473; -0.960922; 0.0044473]
Погрешность
c := 0 .. 13
z := 13
R[c] := |y[:, c] - x|
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R[z] = 1.32985e-10
# Проверка сходимости
S := E - A
E = [1, 0, 0, 0; 0, 1, 0, 0; 0, 0, 1, 0; 0, 0, 0, 1]
A = [
    1.422, 0.432, -0.599, 0.202;
    0.202, 1.422, 0.432, -0.599;
    -0.599, 0.202, 1.422, 0.432;
    0.432, -0.599, 0.202, 1.422
]
S = [
    -0.422, -0.432, 0.599, -0.202;
    -0.202, -0.422, -0.432, 0.599;
    0.599, -0.202, -0.422, -0.432;
    -0.432, 0.599, -0.202, -0.422
]
norm1(S) = 1.655
norm2(S) = 1.04659
eigenvals(S) = [0.811; -0.457; -1.021 + 0.23i; -1.021 - 0.23i]
norme(S) = 1.7485
normi(S) = 1.655
# Угловые миноры матрицы А:
M1 := [1.422, 0.432, -0.599; 0.202, 1.422, 0.432; -0.599, 0.202, 1.422]
|M1| = 1.98078
M2 := [0.432, -0.599, 0.202; 1.422, 0.432, -0.599; 0.202, 1.422, 0.432]
|M2| = 1.27987
M3 := [0.202, 1.422, 0.432; -0.599, 0.202, 1.422; 0.432, -0.599, 0.202]
|M3| = 1.3432
M4 := [1.422, 0.432, -0.599; 0.202, 1.422, 0.432; -0.599, 0.202, 1.422]
|M4| = 1.98078
