# 1. Находим решение системы уравнений
D := [
    1.342, 0.432, -0.599, 0.202;
    0.202, 1.342, 0.432, -0.599;
    -0.599, 0.202, 1.342, 0.432;
    0.432, -0.599, 0.202, 1.342
]
C := [0.02, 0, 0, 0; 0, 0.02, 0, 0; 0, 0, 0.02, 0; 0, 0, 0, 0.02]
b := [1.941; -0.230; -1.941; 0.230]
k := 1
A := D + k*C
A = [
    1.362, 0.432, -0.599, 0.202;
    0.202, 1.362, 0.432, -0.599;
    -0.599, 0.202, 1.362, 0.432;
    0.432, -0.599, 0.202, 1.362
]
x := lsolve(A, b)
x = [0.98994; -0.00117996; -0.98994; 0.00117996]
# 2. Метод Якоби
d := [1.362, 0, 0, 0; 0, 1.362, 0, 0; 0, 0, 1.362, 0; 0, 0, 0, 1.362]
m := 0 .. 15
B[m] := D + A^-1
E := [1, 0, 0, 0; 0, 1, 0, 0; 0, 0, 1, 0; 0, 0, 0, 1]
t := 15
k := 0 .. t
S[0] := E - B[0]^-1*A
g[0] := B[0]^-1*b
S[k] := E - B[k]^-1*A
g[k] := B[k]^-1*b
y[:, 0] := b
y[:, k + 1] := g[k] + S[k]*y[:, k]
y[:, t + 1] = [0.98994; -0.00117996; -0.98994; 0.00117996]
x = [0.98994; -0.00117996; -0.98994; 0.00117996]
# 3. Погрешность
c := 0 .. 15
r[c] := |y[:, c] - x|
z := 15
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r = [1.38338; 0.274765; 0.0545732; 0.0108392; 0.00215287; 0.000427598; 8.49287e-5; 1.68684e-5; 3.35036e-6; 6.65442e-7; 1.32169e-7; 2.62511e-8; 5.21394e-9; 1.03558e-9; 2.05685e-10; 4.08526e-11]
r[z] = 4.08526e-11
# 4. Проверка сходимости
S := d - 1/2*A
S = [
    0.681, -0.216, 0.2995, -0.101;
    -0.101, 0.681, -0.216, 0.2995;
    0.2995, -0.101, 0.681, -0.216;
    -0.216, 0.2995, -0.101, 0.681
]
norm1(S) = 1.2975
norm2(S) = 1.2975
norme(S) = 1.56246
normi(S) = 1.2975
# Найдём угловые миноры матрицы A
M1 := [1.362, 0.432, -0.599; 0.202, 1.362, 0.432; -0.599, 0.202, 1.362]
|M1| = 1.66395
A = [
    1.362, 0.432, -0.599, 0.202;
    0.202, 1.362, 0.432, -0.599;
    -0.599, 0.202, 1.362, 0.432;
    0.432, -0.599, 0.202, 1.362
]
M2 := [0.432, -0.599, 0.202; 1.362, 0.432, -0.599; 0.202, 1.362, 0.432]
|M2| = 1.21507
M3 := [1.362, 0.432, -0.599; 0.202, 1.362, 0.432; -0.599, 0.202, 1.362]
|M3| = 1.66395
M4 := [0.202, 1.362, 0.432; -0.599, 0.202, 1.362; 0.432, -0.599, 0.202]
|M4| = 1.25652
