f(x) := e^(1 - x) + x^2 - 5
a := -2
b := 3
I := integral(f(x), x = a .. b)
I = 6.61687
# Квадратурная формула левых прямоугольников
k := 1 .. 10
n[k] := 2^k
h[k] := (b - a)/n[k]
h = [0; 2.5; 1.25; 0.625; 0.3125; 0.15625; 0.078125; 0.0390625; 0.0195312; 0.00976562; 0.00488281]
J[k] := sum(h/2*(f(a + i*h[k]) + f(a + h[k] + i*h[k])), i = 0 .. n[k] - 1)
Z[k] := |I - J[k]|
Z = [0; 22.8583; 22.6159; 30.1214; 55.1958; 113.479; 234.358; 478.19; 966.856; 1944.68; 3900.57]
