f(x) := ln(x) - 1/x^2
a := 1
b := 3
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f1(x) := d/dx(f(x))
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M := 13
m := 2
TOL := 10^-10
τ := 2/M
n := 150
k := 0 .. n
y[0] := 1
y[k + 1] := y[k] - τ*f(y[k])
t := 1
t := root(f(t), t)
z[k] := |f(y[k])|/m
t = 1.53158
y = [
    1; 1.15385; 1.24739; 1.31225; 1.35979; 1.39571; 1.42339; 1.44501; 1.46206; 1.47559
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]
s[k] := |y[k] - t|
s = [
    0.531584; 0.377738; 0.284198; 0.219331; 0.171797; 0.135874; 0.108191; 0.0865713; 0.069526; 0.0559928
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]
z = [
    0.5; 0.304005; 0.210817; 0.154486; 0.116749; 0.089971; 0.0702639; 0.0553972; 0.0439829; 0.0351053
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]
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