# Решение системы уравнений Ax=B
C := [0.02, 0, 0, 0; 0, 0.02, 0, 0; 0, 0, 0.02, 0; 0, 0, 0, 0.02]
D := [
    1.342, 0.432, -0.599, 0.202;
    0.202, 1.342, 0.432, -0.599;
    -0.599, 0.202, 1.342, 0.432;
    0.432, -0.599, 0.202, 1.342
]
B := [1.941; -0.230; -1.941; 0.230]
A := D + 4*C
x := lsolve(A, B)
A = [
    1.422, 0.432, -0.599, 0.202;
    0.202, 1.422, 0.432, -0.599;
    -0.599, 0.202, 1.422, 0.432;
    0.432, -0.599, 0.202, 1.422
]
x = [0.960922; -0.0044473; -0.960922; 0.0044473]
# Метод простых итераций
m := 210
y[:, 0] := B
τ := 0.25
i := 0 .. m  # Условия сходимости
y[:, i + 1] := y[:, i] + τ*(B - A*y[:, i])
S := identity(4) - τ*A
norm1(S) = 0.95275
y[:, m + 1] = [0.960922; -0.0044473; -0.960922; 0.0044473]
norm2(S) = 0.95275
norme(S) = 1.34465
Погрешность
normi(S) = 0.95275
r[i] := |y[:, i] - x|
eigenvals(S) = [0.95275; 0.63575; 0.49475 + 0.0575i; 0.49475 - 0.0575i]
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