# 1. Интерполяционный многочлен Лагранжа
f(x) := ln(x) - 1/x^2
a := 1
b := 6
# Точки для вычисления погрешности интерполяции
j := 0 .. 137
t[j] := a + (b - a)*j/137
n := [5; 10; 15; 20; 25; 30; 40; 50; 60; 70]
# Равностоящие узлы
N := n[0]
i := 0 .. N
x[i] := a + (b - a)*i/N
L(t) := sum(f(x[k])*product(if(k - i, (t - x[i])/(x[k] - x[i]), 1), i = 0 .. N), k = 0 .. N)
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# Вычисление погрешности интерполяции
s[j]
