# Среднеквадратичные приближения
n := 10
x := [0.25; 0.31; 0.36; 0.39; 0.43; 0.47; 0.52; 0.56; 0.64; 0.66; 0.71]
y := [0.552; 0.615; 0.667; 0.740; 0.742; 0.687; 0.643; 0.589; 0.584; 0.559; 0.521]
s(j) := sum(x[i]^j, i = 0 .. n)
b(j) := sum(y[i]*x[i]^j, i = 0 .. n)
A2 := [s(0), s(1), s(2); s(1), s(2), s(3); s(2), s(3), s(4)]
B2 := [b(0); b(1); b(2)]
a2 := lsolve(A2, B2)
p2(t) := sum(a2[k]*t^k, k = 0 .. 2)
A3 := [s(0), s(1), s(2), s(3); s(1), s(2), s(3), s(4); s(2), s(3), s(4), s(5); s(3), s(4), s(5), s(6)]
B3 := [b(0); b(1); b(2); b(3)]
a3 := lsolve(A3, B3)
p3(t) := sum(a3[k]*t^k, k = 0 .. 3)
a8 := regress(x, y, 8)
p8(t) := interp(a8, x, y, t)
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Погрешности
i := 0 .. n
# Абсолютная погрешность
ar2[i] := |y[i] - p2(x[i])|
max(ar2) = 0.0657251
ar3[i] := |y[i] - p3(x[i])|
max(ar3) = 0.0376766
ar8[i] := |y[i] - p8(x[i])|
max(ar8) = 0.0170217
# Среднеквадратичная погрешность
sr2 := 1/(n + 1)*sqrt(sum(ar2[i]^2, i))
sr2 = 0.0105415
sr2 = 0.0105415
sr3 := 1/(n + 1)*sqrt(sum(ar3[i]^2, i))
sr8 := 1/(n + 1)*sqrt(sum(ar8[i]^2, i))
sr8 = 0.00261838
