f(x) := ln(x) - 1/x^2
a := 1
b := 6
I := integral(f(x), x = a .. b)
I = 4.91722
# Квадратурная формула средних прямоугольников
k := 1 .. 10
n[k] := 2^k
h[k] := (b - a)/n[k]
a[k] := a + h[k]/2
J[k] := sum(h[k]*f(a[k] + i*h[k]), i = 0 .. n[k] - 1)
J[k] = [5.31806; 5.05915; 4.95934; 4.92843; 4.92008; 4.91794; 4.9174; 4.91727; 4.91723; 4.91723]
Z[k] := |I - J[k]|
# Оценка погрешности по методу Рунге
k := 2 .. 10
R[k] := |J[k] - J[k - 1]|/1
R[k - 1]/R[k] = [0; 2.59393; 3.2295; 3.69898; 3.90934; 3.97595; 3.99389; 3.99847; 3.99962]
Z[k] = [0.141928; 0.0421159; 0.0112097; 0.00285431; 0.000717028; 0.000179476; 4.48829e-5; 1.12216e-5; 2.80545e-6]
R[k] = [0.258905; 0.0998119; 0.0309063; 0.00835535; 0.00213728; 0.000537552; 0.000134593; 3.36613e-5; 8.41613e-6]
# Квадратурная формула Гаусса
m := 4
j := 1 .. m
c[1] := 0.17392742
x[1] := 0.06943184
c[2] := 0.32607258
x[2] := 0.33000948
c[3] := 0.32607258
x[3] := 0.66999052
c[4] := 0.17392742
x[4] := 0.93056815
a := 1
b := 6
z[j] := a + (b - a)*x[j]
G := (b - a)*sum(c[j]*f(z[j]), j = 1 .. m)
|I - G| = 0.00938038
G = 4.9266
