f(x) := 2*e^(-x) - x/2
a := 0
b := 2
# [plot: f(x) vs x]
x := -10 .. 10
x := a, 10^-2 .. b
# [plot: f(x) vs x]
t := 1
t := root(f(t), t)
t = 1.20217
# Упрощенный метод Ньютона.
f0 := d/da(f(a)) = -2.5
f(a) = 2
g(c) := c - f(c)/f0
k[1] := g(a) = 0.8
k[2] := g(k[1]) = 0.999463
k[3] := g(k[2]) = 1.09403
k[4] := g(k[3]) = 1.14312
k[5] := g(k[4]) = 1.16955
k[6] := g(k[5]) = 1.18405
k[7] := g(k[6]) = 1.19207
k[8] := g(k[7]) = 1.19653
k[9] := g(k[8]) = 1.19902
k[10] := g(k[9]) = 1.20041
k[11] := g(k[10]) = 1.20118
k[12] := g(k[11]) = 1.20162
k[13] := g(k[12]) = 1.20186
k[14] := g(k[13]) = 1.202
k[15] := g(k[14]) = 1.20207
k[16] := g(k[15]) = 1.20211
k[17] := g(k[16]) = 1.20214
k[18] := g(k[17]) = 1.20215
k[19] := g(k[18]) = 1.20216
k[20] := g(k[19]) = 1.20216
k[21] := g(k[20]) = 1.20216
k[22] := g(k[21]) = 1.20217
k[23] := g(k[22]) = 1.20217
k[24] := g(k[23]) = 1.20217
k[25] := g(k[24]) = 1.20217
k[26] := g(k[25]) = 1.20217
k[27] := g(k[26]) = 1.20217
k[28] := g(k[27]) = 1.20217
k[29] := g(k[28]) = 1.20217
k[30] := g(k[29]) = 1.20217
k[31] := g(k[30]) = 1.20217
p(x) := d/dx(d/dx(f(x)))
# [plot: p(x) vs x]
k[32] := g(k[31]) = 1.20217
k[33] := g(k[32]) = 1.20217
k[34] := g(k[33]) = 1.20217
k[35] := g(k[34]) = 1.20217
k[36] := g(k[35]) = 1.20217
k[37] := g(k[36]) = 1.20217
# Погрешности
n := 1 .. 8
f(k[8]) = 0.00621915
Δ[n] := |t - k[n]| = [0.402168; 0.202705; 0.108136; 0.0590513; 0.0326156; 0.0181213; 0.0101003; 0.00563951]
f(t) = 3.68523e-10
δ[n] := |t - k[n]|/t = [0.334536; 0.168616; 0.0899506; 0.0491207; 0.0271306; 0.0150738; 0.00840178; 0.00469112]
δ[n] := |t - k[n]|/k[n] = [0.50271; 0.202814; 0.0988415; 0.0516582; 0.0278872; 0.0153045; 0.00847297; 0.00471323]
# [plot: δ[n], Δ[n] vs n]
# Сравнение с обычным методом Ньютона
g(c) := c - f(c)/d/dc(f(c))
k[1] := g(a) = 0.8
f(k[1]) = 0.498658
k[2] := g(k[1]) = 1.15653
f(k[2]) = 0.0508912
k[3] := g(k[2]) = 1.2016
f(k[3]) = 0.000629516
k[4] := g(k[3]) = 1.20217
f(k[4]) = 9.82136e-8
k[5] := g(k[4]) = 1.20217
f(k[5]) = 2.33147e-15
