# формула параболы, 4 узла
f(x) := 2*e^(-x) - x/2
a := 1
b := 7
I := integral(f(x), x = a .. b) = -11.2661
# квадратурная формула Симпсона (парабол)
k := 1 .. 10
n[k] := 2^k
h[k] := (b - a)/n[k]
J[k] := h[k]/3*(f(a) + f(b) + 2*sum(f(a + 2*j*h[k]), j = 1 .. n[k]/2 - 1) + 4*sum(f(a + (2*j - 1)*h[k]), j = 1 .. n[k]/2))
D[k] := |I - J[k]|
# оценка погрешности по методу Рунге
k := 1 .. 10
R[k] := |J[k] - J[k - 1]|/(2^4 - 1)
# решение | погрешность | рунге
скорость_прближения
J = [0; -17.6407; -11.2499; -11.2649; -11.266; -11.2661; -11.2661; -11.2661; -11.2661; -11.2661; -11.2661]
D[k] = [6.37466; 0.0161746; 0.00120855; 7.93023e-5; 5.01852e-6; 3.14642e-7; 1.96805e-8; 1.23027e-9; 7.68932e-11; 4.80505e-12]
R[k] = [1.17605; 0.426056; 0.000997734; 7.52834e-5; 4.95225e-6; 3.13592e-7; 1.96641e-8; 1.23002e-9; 7.6892e-11; 4.80587e-12]
R[k - 1]/R[k] = [0; 2.76032; 427.023; 13.253; 15.2019; 15.792; 15.9475; 15.9868; 15.9967; 15.9996]
# квадратурная формула Гаусса
x[1] := 0.06943184
c[1] := 0.17392742
m := 4
j := 1 .. m
x[2] := 0.33000948
c[2] := 0.32607258
x[3] := 0.66999052
c[3] := 0.32607258
x[4] := 0.93056815
c[4] := 0.17392742
z[j] := a + (b - a)*x[j]
G := (b - a)*sum(c[j]*f(z[j]), j = 1 .. m) = -11.2663
|I - G| = 0.000258634
