# Получаем матрицу для 3 варианта
V := [
    1.342, 0.432, -0.599, 0.202;
    0.202, 1.342, 0.432, -0.599;
    -0.599, 0.202, 1.342, 0.432;
    0.432, -0.599, 0.202, 1.342
]
C := [0.06, 0, 0, 0; 0, 0.06, 0, 0; 0, 0, 0.06, 0; 0, 0, 0, 0.06]
A := V + C
A = [
    1.402, 0.432, -0.599, 0.202;
    0.202, 1.402, 0.432, -0.599;
    -0.599, 0.202, 1.402, 0.432;
    0.432, -0.599, 0.202, 1.402
]
b := [1.941; -0.230; -1.941; 0.230]
# Решение системы Ax=b
# В функции Isolve запрограммирован численный метод LU-разложения, основанный на алгоритме последовательных исключений Гаусса
x := lsolve(A, b)
x = [0.970406; -0.00340161; -0.970406; 0.00340161]
# Решение системы Ay=b методом релаксации
A1 := [0, 0, 0, 0; 0.202, 0, 0, 0; -0.599, 0.202, 0, 0; 0.432, -0.599, 0.202, 0]
D := [1.402, 0, 0, 0; 0, 1.402, 0, 0; 0, 0, 1.402, 0; 0, 0, 0, 1.402]
# По количеству итераций
m := 40
n := 0 .. m
ω := 1.5
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y[:, 0] := b
y[:, n + 1] := y[:, n] + (D + ω*A1)^-1*(b - A*y[:, n])
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y[:, m + 1] = [0.970406; -0.00340161; -0.970406; 0.00340161]
x = [0.970406; -0.00340161; -0.970406; 0.00340161]
Погрешность
r[n] := |y[:, n] - x|
# [plot: r[n] vs n]
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|A| = 0.985231
d1 := det([A[0, 0], A[0, 1]; A[1, 0], A[1, 1]]) = 1.87834
A = [
    1.402, 0.432, -0.599, 0.202;
    0.202, 1.402, 0.432, -0.599;
    -0.599, 0.202, 1.402, 0.432;
    0.432, -0.599, 0.202, 1.402
]
d2 := det([A[0, 2], A[0, 3]; A[1, 2], A[1, 3]]) = 0.271537
d3 := det([A[2, 0], A[2, 1]; A[3, 0], A[3, 1]]) = 0.271537
d4 := det([A[2, 2], A[2, 3]; A[3, 2], A[3, 3]]) = 1.87834
