# Краевая задача для ОДУ 2-го порядка
# Вариант 16
aa := 0
μ[1] := -0.5
f(x) := 1/(x^2 + 1) - x/3
μ[2] := 2
bb := 2
p(x) := 2 + x
q(x) := 0.6*e^(-x)
# Параметры разностной схемы:
n := 5
i := 0 .. n
h := (bb - aa)/n
x[i] := aa + i*h
схема_левой_разности_производной
i := 1 .. n - 1
b[i] := 1
a[i] := 1 - (p(x[i])*h)
c[i] := 2 - p(x[i])*h + q(x[i])*h^2
g[i] := -f(x[i])
# Метод прогонки
α[1] := 0
β[1] := μ[1]
α[i + 1] := b[i]/(c[i] - α[1]*a[i])
β[i + 1] := (h^2*g[i] + β[1]*a[i])/(c[i] - α[1]*a[i])
i := n - 1 .. 1
y1[0] := μ[1]
y1[n] := μ[2]
y1[i] := α[i + 1]*y1[i + 1] + β[i + 1]
i := 0 .. n
# [plot: y1[i] vs x[i]]
n := 2*n
i := 1 .. n  # Новое значение n
h := (bb - aa)/n
x[i] := aa + i*h
i := 1 .. n - 1
c[i] := 2 - p(x[i])*h + q(x[i])*h^2
g[i] := -f(x[i])
b[i] := 1
a[i] := 1 - p(x[i])*h
α[1] := 0
β[1] := μ[1]
α[i + 1] := b[i]/(c[i] - α[1]*a[i])
β[i + 1] := (h^2*g[i] + β[1]*a[i])/(c[i] - α[1]*a[i])
i := n - 1 .. 1
y2[0] := μ[1]
y2[n] := μ[2]
y2[i] := α[i + 1]*y2[i + 1] + β[i + 1]
# Оценка погрешности
y1[0] = -0.5
y2[0] = -0.5
j := 0 .. n/2
r[j] := |y1[j] - y2[2*j]|
max(r) = 5.92483
# [plot: r[j] vs j]
# Решаюший блок
solve block
    # constraints
    (d^2/dt^2(w(t))) + p(t)*(d/dt(w(t))) - q(t)*w(t) == f(t)
    w(aa) == μ[1]
    w(bb) == μ[2]
    # solver
    w := Odesolve(w(t), bb)
end solve block
# [plot: w(t) vs t]
# [plot: w(x[i]) - y2[i] vs i]
