# Решение через root
a := -5
b := 5
x := a, a + 10^-3 .. b
f(x) := e^x + 2*x^2 - 3
# [plot: f(x) vs x]
ans := 1
ans := root(f(ans), ans) = 0.701297
# Приближенное значение модифицированным методом Ньютона
d(x) := d/dx(f(x)) → e^x + 4*x
i := 1 .. 17
ε[i] := i
m := 1
modNewton(l, i) :=
    x1 ← l
    x0 ← l
    a ← d(l)
    count ← 0
    while count ≠ i
        x0 ← x1
        count ← count + 1
        x1 ← x0 - f(x0)/a
    x1
y[i] := modNewton(m, ε[i]) = [0.744238; 0.71259; 0.704428; 0.702176; 0.701545; 0.701367; 0.701317; 0.701302; 0.701298; 0.701297; 0.701297; 0.701297; 0.701297; 0.701297; 0.701297; 0.701297; 0.701297]
ans = 0.701297
# Вычисление погрешности метода
s[i] := f(y[i]) = [0.212617; 0.0548371; 0.0151271; 0.00424357; 0.00119592; 0.000337465; 9.52608e-5; 2.68933e-5; 7.59252e-6; 2.14354e-6; 6.05171e-7; 1.70854e-7; 4.82361e-8; 1.36182e-8; 3.84474e-9; 1.08546e-9; 3.06451e-10]
k[i] := |y[i] - ans| = [0.0429412; 0.0112936; 0.00313128; 0.000879642; 0.000247997; 6.99878e-5; 1.9757e-5; 5.57762e-6; 1.57462e-6; 4.44489e-7; 1.25428e-7; 3.53501e-8; 9.91889e-9; 2.73906e-9; 7.12025e-10; 1.39745e-10; 2.1823e-11]
# [chart]
    X[1] := i
    X[2] := i
    Y[1] := s[i]
    Y[2] := k[i]
# Отсутствие сходимости метода
# [plot: d(x) vs x]
ansD := 0
ansD := root(d(ansD), ansD) = -0.203888
y[i] := modNewton(ansD, ε[i])  # error: При вычислении этого выражения получено число с амплитудой больше 10^307. Mathcad не может присваивать числа больше 10^307.
dd(x) := d/dx(d(x)) → e^x + 4
c := Maximize(dd, x)  # error: Начальное приближение должно состоять из чисел и матриц.
# [plot: dd(x) vs x]
