# Решение системы уравнений Ax=B
D := [
    1.342, 0.432, -0.599, 0.202;
    0.202, 1.343, 0.432, -0.599;
    -0.599, 0.202, 1.343, 0.432;
    0.432, -0.599, 0.202, 1.342
]
C := [0.02, 0, 0, 0; 0, 0.02, 0, 0; 0, 0, 0.02, 0; 0, 0, 0, 0.02]
A := D + 5*C = [
    1.442, 0.432, -0.599, 0.202;
    0.202, 1.443, 0.432, -0.599;
    -0.599, 0.202, 1.443, 0.432;
    0.432, -0.599, 0.202, 1.442
]
b := [1.941; -0.23; -1.941; 0.23]
ans := lsolve(A, b) = [0.952679; -0.00644328; -0.950098; 0.00450954]
# Метод минимальных невязок
def(lastIter) :=
    x[:, 0] ← b
    for i ∈ 0 .. lastIter
        r[:, i] ← A*x[:, i] - b
        c[i] ← A*r[:, i]
        τ[i + 1] ← (r[:, i]*c[i])/(c[i]*c[i])
        x[:, i + 1] ← x[:, i] + τ[i + 1]*(b - A*x[:, i])
    return x[:, lastIter]
m := 100
i := 0 .. m
q[i] := def(i)
q[85] = [0.952679; -0.00644328; -0.950098; 0.00450954]
ans = [0.952679; -0.00644328; -0.950098; 0.00450954]
# Погрешность
pogr[i] := |ans - q[i]|
# [chart]
    X[1] := i
    Y[1] := pogr[i]
getNev(lastIter) :=
    x[:, 0] ← b
    for i ∈ 0 .. lastIter
        r[:, i] ← A*x[:, i] - b
        c[i] ← A*r[:, i]
        τ[i + 1] ← (r[:, i]*c[i])/(c[i]*c[i])
        x[:, i + 1] ← x[:, i] + τ[i + 1]*(b - A*x[:, i])
    τ[i + 1]
t[i] := getNev(i)
