D := [
    1.342, 0.432, -0.599, 0.202;
    0.432, 1.343, 0.256, -0.599;
    -0.599, 0.256, 1.342, 0.532;
    0.202, -0.599, 0.532, 1.342
]
C := [0.05, 0, 0, 0; 0, 0.03, 0, 0; 0, 0, 0.02, 0; 0, 0, 0, 0.04]
A := D + 5*C = [
    1.592, 0.432, -0.599, 0.202;
    0.432, 1.493, 0.256, -0.599;
    -0.599, 0.256, 1.442, 0.532;
    0.202, -0.599, 0.532, 1.542
]
# Нахождение собственных чисел и собственных векторов с помощью eigenvals и eigenvecs
L := eigenvals(A) = [2.3728; 1.86881; 1.62626; 0.201125]
W := eigenvecs(A) = [
    0.502223, 0.56615, -0.465324, 0.459042;
    0.463432, -0.473297, -0.563102, -0.494102;
    -0.499865, -0.426632, -0.52627, 0.539593;
    -0.532107, 0.522923, -0.435235, -0.503967
]
# Метод вращений
f(i, j, A) :=
    if A[i, i] ≠ A[j, j]
        0.5*atan(2*A[i, j]/(A[i, i] - A[j, j]))
    else
        π/4
c(i, j, A) := cos(f(i, j, A))
s(i, j, A) := sin(f(i, j, A))
t(i, j, A) := sum(sum(A[i, j]^2, j = 0 .. 3), i = 0 .. 3) - sum(A[i, i]^2, i = 0 .. 3)
# 1 итерация
V := identity(4)
i := 0
j := 2
U := identity(4)
U[i, i] := c(i, j, A)
U[j, j] := c(i, j, A)
U[i, j] := -s(i, j, A)
U[j, i] := s(i, j, A)
A := transpose(U)*A*U
V := V*U
t(i, j, A) = 1.86958
A = [
    2.12068, 0.154489, 0, -0.200589;
    0.154489, 1.493, 0.4778, -0.599;
    0, 0.4778, 0.913323, 0.532534;
    -0.200589, -0.599, 0.532534, 1.542
]
# 2 итерация
V := identity(4)
i := 2
j := 3
U := identity(4)
U[i, i] := c(i, j, A)
U[j, j] := c(i, j, A)
U[i, j] := -s(i, j, A)
U[j, i] := s(i, j, A)
A := transpose(U)*A*U
V := V*U
t(i, j, A) = 1.30239
A = [
    2.12068, 0.154489, 0.0994565, -0.174197;
    0.154489, 1.493, 0.711931, -0.283282;
    0.0994565, 0.711931, 0.609276, 0;
    -0.174197, -0.283282, 0, 1.84605
]
# 3 итерация
V := identity(4)
i := 1
j := 2
U := identity(4)
U[i, i] := c(i, j, A)
U[j, j] := c(i, j, A)
U[i, j] := -s(i, j, A)
U[j, i] := s(i, j, A)
A := transpose(U)*A*U
V := V*U
t(i, j, A) = 0.288703
A = [
    2.12068, 0.183354, 0.0118106, -0.174197;
    0.183354, 1.88904, 0, -0.247555;
    0.0118106, 0, 0.213231, 0.137714;
    -0.174197, -0.247555, 0.137714, 1.84605
]
# 4 итерация
V := identity(4)
i := 1
j := 3
U := identity(4)
U[i, i] := c(i, j, A)
U[j, j] := c(i, j, A)
U[i, j] := -s(i, j, A)
U[j, i] := s(i, j, A)
A := transpose(U)*A*U
V := V*U
t(i, j, A) = 0.166136
A = [
    2.12068, 0.25287, 0.0118106, -0.0044779;
    0.25287, 2.11603, -0.0930708, 0;
    0.0118106, -0.0930708, 0.213231, 0.101504;
    -0.0044779, 0, 0.101504, 1.61906
]
# 5 итерация
V := identity(4)
i := 0
j := 1
U := identity(4)
U[i, i] := c(i, j, A)
U[j, j] := c(i, j, A)
U[i, j] := -s(i, j, A)
U[j, i] := s(i, j, A)
A := transpose(U)*A*U
V := V*U
t(i, j, A) = 0.0382494
A = [
    2.37124, 0, -0.0571185, -0.00318086;
    0, 1.86547, -0.0744254, 0.00315178;
    -0.0571185, -0.0744254, 0.213231, 0.101504;
    -0.00318086, 0.00315178, 0.101504, 1.61906
]
# 6 итерация
V := identity(4)
i := 1
j := 3
U := identity(4)
U[i, i] := c(i, j, A)
U[j, j] := c(i, j, A)
U[i, j] := -s(i, j, A)
U[j, i] := s(i, j, A)
A := transpose(U)*A*U
V := V*U
t(i, j, A) = 0.0382296
A = [
    2.37124, -4.06749e-5, -0.0571185, -0.0031806;
    -4.06749e-5, 1.86551, -0.0731213, 0;
    -0.0571185, -0.0731213, 0.213231, 0.102447;
    -0.0031806, 0, 0.102447, 1.61902
]
# 7 итерация
V := identity(4)
i := 2
j := 3
U := identity(4)
U[i, i] := c(i, j, A)
U[j, j] := c(i, j, A)
U[i, j] := -s(i, j, A)
U[j, i] := s(i, j, A)
A := transpose(U)*A*U
V := V*U
t(i, j, A) = 0.0172387
A = [
    2.37124, -4.06749e-5, -0.0567391, -0.00730209;
    -4.06749e-5, 1.86551, -0.0729299, -0.00528686;
    -0.0567391, -0.0729299, 0.205805, 0;
    -0.00730209, -0.00528686, 0, 1.62645
]
# 8 итерация
V := identity(4)
i := 1
j := 3
U := identity(4)
U[i, i] := c(i, j, A)
U[j, j] := c(i, j, A)
U[i, j] := -s(i, j, A)
U[j, i] := s(i, j, A)
A := transpose(U)*A*U
V := V*U
t(i, j, A) = 0.0171828
A = [
    2.37124, 0.000120698, -0.0567391, -0.00730121;
    0.000120698, 1.86563, -0.0729121, 0;
    -0.0567391, -0.0729121, 0.205805, -0.00161161;
    -0.00730121, 0, -0.00161161, 1.62633
]
# 9 итерация
V := identity(4)
i := 1
j := 2
U := identity(4)
U[i, i] := c(i, j, A)
U[j, j] := c(i, j, A)
U[i, j] := -s(i, j, A)
U[j, i] := s(i, j, A)
A := transpose(U)*A*U
V := V*U
t(i, j, A) = 0.00655048
A = [
    2.37124, 0.00260581, -0.0566793, -0.00730121;
    0.00260581, 1.86883, 0, 7.05904e-5;
    -0.0566793, 0, 0.202608, -0.00161007;
    -0.00730121, 7.05904e-5, -0.00161007, 1.62633
]
# 10 итерация
V := identity(4)
i := 1
j := 3
U := identity(4)
U[i, i] := c(i, j, A)
U[j, j] := c(i, j, A)
U[i, j] := -s(i, j, A)
U[j, i] := s(i, j, A)
A := transpose(U)*A*U
V := V*U
t(i, j, A) = 0.00655047
A = [
    2.37124, 0.00260369, -0.0566793, -0.00730197;
    0.00260369, 1.86883, -4.68682e-7, 0;
    -0.0566793, -4.68682e-7, 0.202608, -0.00161007;
    -0.00730197, 0, -0.00161007, 1.62633
]
# 11 итерация
V := identity(4)
i := 0
j := 2
U := identity(4)
U[i, i] := c(i, j, A)
U[j, j] := c(i, j, A)
U[i, j] := -s(i, j, A)
U[j, i] := s(i, j, A)
A := transpose(U)*A*U
V := V*U
t(i, j, A) = 0.00012538
A = [
    2.37272, 0.00260281, 0, -0.00725744;
    0.00260281, 1.86883, 6.75119e-5, 0;
    0, 6.75119e-5, 0.201128, -0.00180017;
    -0.00725744, 0, -0.00180017, 1.62633
]
# 12 итерация
V := identity(4)
i := 0
j := 3
U := identity(4)
U[i, i] := c(i, j, A)
U[j, j] := c(i, j, A)
U[i, j] := -s(i, j, A)
U[j, i] := s(i, j, A)
A := transpose(U)*A*U
V := V*U
t(i, j, A) = 2.00396e-5
A = [
    2.37279, 0.00260269, 1.75013e-5, 0;
    0.00260269, 1.86883, 6.75119e-5, 2.53046e-5;
    1.75013e-5, 6.75119e-5, 0.201128, -0.00180008;
    0, 2.53046e-5, -0.00180008, 1.62626
]
# 13 итерация
V := identity(4)
i := 0
j := 1
U := identity(4)
U[i, i] := c(i, j, A)
U[j, j] := c(i, j, A)
U[i, j] := -s(i, j, A)
U[j, i] := s(i, j, A)
A := transpose(U)*A*U
V := V*U
t(i, j, A) = 6.49161e-6
A = [
    2.3728, 0, 1.78497e-5, 1.3068e-7;
    0, 1.86881, 6.74206e-5, 2.53043e-5;
    1.78497e-5, 6.74206e-5, 0.201128, -0.00180008;
    1.3068e-7, 2.53043e-5, -0.00180008, 1.62626
]
# 14 итерация
V := identity(4)
i := 1
j := 2
U := identity(4)
U[i, i] := c(i, j, A)
U[j, j] := c(i, j, A)
U[i, j] := -s(i, j, A)
U[j, i] := s(i, j, A)
A := transpose(U)*A*U
V := V*U
t(i, j, A) = 6.48252e-6
A = [
    2.3728, 7.21621e-10, 1.78497e-5, 1.3068e-7;
    7.21621e-10, 1.86881, 0, 2.52315e-5;
    1.78497e-5, 0, 0.201128, -0.00180008;
    1.3068e-7, 2.52315e-5, -0.00180008, 1.62626
]
