# Интерполяционный многочлен Лагранжа
f(x) := e^x - 2*(x - 2)^2
a := -2
b := 3
nj := 120
j := 0, 1 .. nj
t[j] := a + (b - a)*j/nj
n := [5; 10; 15; 20; 25; 30; 40; 50; 60; 70]
# Равноотстоящие узлы
N := n[0]
i := 0 .. N
x[i] := a + (b - a)*i/N
L(t) := sum(f(x[k])*product(if(k - i, (t - x[i])/(x[k] - x[i]), 1), i = 0 .. N), k = 0 .. N)
# [plot: L(t[j]), f(t[j]) vs t[j]]
# [plot: f(t[j]) - L(t[j]) vs t[j]]
# Вычисление погрешности
s[j] := |f(t[j]) - L(t[j])|
r[0] := max(s) = 0.0634079
N := n[1]
i := 0 .. N
x[i] := a + (b - a)*i/N
L(t) := sum(f(x[k])*product(if(k - i, (t - x[i])/(x[k] - x[i]), 1), i = 0 .. N), k = 0 .. N)
s[j] := |f(t[j]) - L(t[j])|
r[1] := max(s) = 1.12451e-5
N := n[2]
i := 0 .. N
x[i] := a + (b - a)*i/N
L(t) := sum(f(x[k])*product(if(k - i, (t - x[i])/(x[k] - x[i]), 1), i = 0 .. N), k = 0 .. N)
s[j] := |f(t[j]) - L(t[j])|
r[2] := max(s) = 3.05153e-10
N := n[3]
i := 0 .. N
x[i] := a + (b - a)*i/N
L(t) := sum(f(x[k])*product(if(k - i, (t - x[i])/(x[k] - x[i]), 1), i = 0 .. N), k = 0 .. N)
s[j] := |f(t[j]) - L(t[j])|
r[3] := max(s) = 1.13154e-11
N := n[4]
i := 0 .. N
x[i] := a + (b - a)*i/N
L(t) := sum(f(x[k])*product(if(k - i, (t - x[i])/(x[k] - x[i]), 1), i = 0 .. N), k = 0 .. N)
s[j] := |f(t[j]) - L(t[j])|
r[4] := max(s) = 1.24803e-10
N := n[5]
i := 0 .. N
x[i] := a + (b - a)*i/N
L(t) := sum(f(x[k])*product(if(k - i, (t - x[i])/(x[k] - x[i]), 1), i = 0 .. N), k = 0 .. N)
s[j] := |f(t[j]) - L(t[j])|
r[5] := max(s) = 2.58815e-9
N := n[6]
i := 0 .. N
x[i] := a + (b - a)*i/N
L(t) := sum(f(x[k])*product(if(k - i, (t - x[i])/(x[k] - x[i]), 1), i = 0 .. N), k = 0 .. N)
s[j] := |f(t[j]) - L(t[j])|
r[6] := max(s) = 1.62498e-6
N := n[7]
i := 0 .. N
x[i] := a + (b - a)*i/N
L(t) := sum(f(x[k])*product(if(k - i, (t - x[i])/(x[k] - x[i]), 1), i = 0 .. N), k = 0 .. N)
s[j] := |f(t[j]) - L(t[j])|
r[7] := max(s) = 0.00147291
N := n[8]
i := 0 .. N
x[i] := a + (b - a)*i/N
L(t) := sum(f(x[k])*product(if(k - i, (t - x[i])/(x[k] - x[i]), 1), i = 0 .. N), k = 0 .. N)
s[j] := |f(t[j]) - L(t[j])|
r[8] := max(s) = 1.75012
N := n[9]
i := 0 .. N
x[i] := a + (b - a)*i/N
r = [0.0634079; 1.12451e-5; 3.05153e-10; 1.13154e-11; 1.24803e-10; 2.58815e-9; 1.62498e-6; 0.00147291; 1.75012]
L(t) := sum(f(x[k])*product(if(k - i, (t - x[i])/(x[k] - x[i]), 1), i = 0 .. N), k = 0 .. N)
s[j] := |f(t[j]) - L(t[j])|
r[9] := max(s) = 96.338
# [plot: f(t[j]) - L(t[j]) vs t[j]]
f(-2) = -31.8647
L(-2) = -31.8647
f(-1.99999) = -31.8645
L(-1.99999) = -30.3093
f(-1.9) = -30.2704
L(-1.9) = -32.1769
# [plot: L(t[j]), f(t[j]) vs t[j]]
# Чебышевские узлы
N := n[0]
i := 0 .. N
v[i] := cos(π*(1 + 2*i)/(2*(N + 1)))
z[i] := (a + b)/2 + (b - a)/2*v[i] = [2.91481; 2.26777; 1.14705; -0.147048; -1.26777; -1.91481]
LCH(t) := sum(f(z[k])*product(if(k - i, (t - z[i])/(z[k] - z[i]), 1), i = 0 .. N), k = 0 .. N)
# [plot: f(t[j]) - LCH(t[j]) vs t[j]]
r[0] = 0.0634079
s[j] := |f(t[j]) - LCH(t[j])|
rch[0] := max(s) = 0.0306816
N := n[1]
i := 0 .. N
v[i] := cos(π*(1 + 2*i)/(2*(N + 1)))
z[i] := (a + b)/2 + (b - a)/2*v[i]
LCH(t) := sum(f(z[k])*product(if(k - i, (t - z[i])/(z[k] - z[i]), 1), i = 0 .. N), k = 0 .. N)
s[j] := |f(t[j]) - LCH(t[j])|
rch[1] := max(s) = 1.34415e-6
N := n[2]
i := 0 .. N
v[i] := cos(π*(1 + 2*i)/(2*(N + 1)))
z[i] := (a + b)/2 + (b - a)/2*v[i]
LCH(t) := sum(f(z[k])*product(if(k - i, (t - z[i])/(z[k] - z[i]), 1), i = 0 .. N), k = 0 .. N)
s[j] := |f(t[j]) - LCH(t[j])|
rch[2] := max(s) = 7.10543e-12
N := n[3]
i := 0 .. N
v[i] := cos(π*(1 + 2*i)/(2*(N + 1)))
z[i] := (a + b)/2 + (b - a)/2*v[i]
LCH(t) := sum(f(z[k])*product(if(k - i, (t - z[i])/(z[k] - z[i]), 1), i = 0 .. N), k = 0 .. N)
s[j] := |f(t[j]) - LCH(t[j])|
rch[3] := max(s) = 3.55271e-14
N := n[4]
i := 0 .. N
v[i] := cos(π*(1 + 2*i)/(2*(N + 1)))
z[i] := (a + b)/2 + (b - a)/2*v[i]
LCH(t) := sum(f(z[k])*product(if(k - i, (t - z[i])/(z[k] - z[i]), 1), i = 0 .. N), k = 0 .. N)
s[j] := |f(t[j]) - LCH(t[j])|
rch[4] := max(s) = 3.19744e-14
N := n[5]
i := 0 .. N
v[i] := cos(π*(1 + 2*i)/(2*(N + 1)))
z[i] := (a + b)/2 + (b - a)/2*v[i]
LCH(t) := sum(f(z[k])*product(if(k - i, (t - z[i])/(z[k] - z[i]), 1), i = 0 .. N), k = 0 .. N)
s[j] := |f(t[j]) - LCH(t[j])|
rch[5] := max(s) = 2.4869e-14
N := n[6]
i := 0 .. N
v[i] := cos(π*(1 + 2*i)/(2*(N + 1)))
z[i] := (a + b)/2 + (b - a)/2*v[i]
LCH(t) := sum(f(z[k])*product(if(k - i, (t - z[i])/(z[k] - z[i]), 1), i = 0 .. N), k = 0 .. N)
s[j] := |f(t[j]) - LCH(t[j])|
rch[6] := max(s) = 4.61853e-14
N := n[7]
i := 0 .. N
v[i] := cos(π*(1 + 2*i)/(2*(N + 1)))
z[i] := (a + b)/2 + (b - a)/2*v[i]
LCH(t) := sum(f(z[k])*product(if(k - i, (t - z[i])/(z[k] - z[i]), 1), i = 0 .. N), k = 0 .. N)
s[j] := |f(t[j]) - LCH(t[j])|
rch[7] := max(s) = 1.06581e-13
N := n[8]
i := 0 .. N
v[i] := cos(π*(1 + 2*i)/(2*(N + 1)))
z[i] := (a + b)/2 + (b - a)/2*v[i]
LCH(t) := sum(f(z[k])*product(if(k - i, (t - z[i])/(z[k] - z[i]), 1), i = 0 .. N), k = 0 .. N)
s[j] := |f(t[j]) - LCH(t[j])|
rch[8] := max(s) = 5.32907e-14
N := n[9]
i := 0 .. N
v[i] := cos(π*(1 + 2*i)/(2*(N + 1)))
z[i] := (a + b)/2 + (b - a)/2*v[i]
rch = [0.0306816; 1.34415e-6; 7.10543e-12; 3.55271e-14; 3.19744e-14; 2.4869e-14; 4.61853e-14; 1.06581e-13; 5.32907e-14]
LCH(t) := sum(f(z[k])*product(if(k - i, (t - z[i])/(z[k] - z[i]), 1), i = 0 .. N), k = 0 .. N)
s[j] := |f(t[j]) - LCH(t[j])|
rch[9] := max(s) = 7.10543e-14
# Сравнение погрешностей двух типов узлов
m := 0 .. 9
# [chart]
    X[1] := n[m]
    X[2] := n[m]
    Y[1] := r[m]
    Y[2] := rch[m]
# Линейный интерполяционный сплайн
N := n[0]
i := 0 .. N
xx[i] := a + (b - a)*i/N
y[i] := f(xx[i])
LS1(t) := linterp(xx, y, t)
# [plot: f(t[j]) - LS1(t[j]) vs t[j]]
s[j] := |f(t[j]) - LS1(t[j])|
rls[0] := max(s) = 1.06897
N := n[1]
i := 0 .. N
xx[i] := a + (b - a)*i/N
y[i] := f(xx[i])
LS2(t) := linterp(xx, y, t)
s[j] := |f(t[j]) - LS2(t[j])|
rls[1] := max(s) = 0.366384
N := n[2]
i := 0 .. N
xx[i] := a + (b - a)*i/N
y[i] := f(xx[i])
LS(t) := linterp(xx, y, t)
s[j] := |f(t[j]) - LS(t[j])|
rls[2] := max(s) = 0.181131
N := n[3]
i := 0 .. N
xx[i] := a + (b - a)*i/N
y[i] := f(xx[i])
LS(t) := linterp(xx, y, t)
s[j] := |f(t[j]) - LS(t[j])|
rls[3] := max(s) = 0.10741
N := n[4]
i := 0 .. N
xx[i] := a + (b - a)*i/N
y[i] := f(xx[i])
LS(t) := linterp(xx, y, t)
s[j] := |f(t[j]) - LS(t[j])|
rls[4] := max(s) = 0.0694689
N := n[5]
i := 0 .. N
xx[i] := a + (b - a)*i/N
y[i] := f(xx[i])
LS5(t) := linterp(xx, y, t)
s[j] := |f(t[j]) - LS5(t[j])|
rls[5] := max(s) = 0.0503135
N := n[6]
i := 0 .. N
xx[i] := a + (b - a)*i/N
y[i] := f(xx[i])
LS(t) := linterp(xx, y, t)
s[j] := |f(t[j]) - LS(t[j])|
rls[6] := max(s) = 0.026053
N := n[7]
i := 0 .. N
xx[i] := a + (b - a)*i/N
y[i] := f(xx[i])
LS(t) := linterp(xx, y, t)
s[j] := |f(t[j]) - LS(t[j])|
rls[7] := max(s) = 0.0184274
N := n[8]
i := 0 .. N
xx[i] := a + (b - a)*i/N
y[i] := f(xx[i])
LS(t) := linterp(xx, y, t)
s[j] := |f(t[j]) - LS(t[j])|
rls[8] := max(s) = 0.013254
N := n[9]
i := 0 .. N
xx[i] := a + (b - a)*i/N
rls = [1.06897; 0.366384; 0.181131; 0.10741; 0.0694689; 0.0503135; 0.026053; 0.0184274; 0.013254]
y[i] := f(xx[i])
LS9(t) := linterp(xx, y, t)
s[j] := |f(t[j]) - LS9(t[j])|
rls[9] := max(s) = 0.00951421
# [plot: f(t[j]) - LS1(t[j]), f(t[j]) - LS5(t[j]), f(t[j]) - LS2(t[j]) vs t[j]]
