# Среднеквадратичные приближения
x := [0.24; 0.26; 0.27; 0.29; 0.30; 0.32; 0.37; 0.38; 0.42; 0.49; 0.59]
y := [0.235; 0.254; 0.263; 0.384; 0.491; 0.509; 0.474; 0.393; 0.357; 0.335; 0.303]
n := 10
s(j) := sum(x[i]^j, i = 0 .. n)
b(j) := sum(y[i]*x[i]^j, i = 0 .. n)
A2 := [s(0), s(1), s(2); s(1), s(2), s(3); s(2), s(3), s(4)]
B2 := [b(0); b(1); b(2)]
a2 := lsolve(A2, B2)
p2(t) := sum(a2[k]*t^k, k = 0 .. 2)
A3 := [s(0), s(1), s(2), s(3); s(1), s(2), s(3), s(4); s(2), s(3), s(4), s(5); s(3), s(4), s(5), s(6)]
B3 := [b(0); b(1); b(2); b(3)]
a3 := lsolve(A3, B3)
p3(t) := sum(a3[k]*t^k, k = 0 .. 3)
A4 := [
    s(0), s(1), s(2), s(3), s(4);
    s(1), s(2), s(3), s(4), s(5);
    s(2), s(3), s(4), s(5), s(6);
    s(3), s(4), s(5), s(6), s(7);
    s(4), s(5), s(6), s(7), s(8)
]
B4 := [b(0); b(1); b(2); b(3); b(4)]
a4 := lsolve(A4, B4)
p4(t) := sum(a4[k]*t^k, k = 0 .. 4)
Погрешность
i := 0 .. n
# 1.) Абсолютная
ar2[i] := |y[i] - p2(x[i])|
max(ar2) = 0.12038
ar3[i] := |y[i] - p3(x[i])|
max(ar3) = 0.0723942
ar4[i] := |y[i] - p4(x[i])|
max(ar4) = 0.0790467
# 2.) Среднеквадратичная погрешность
sr2 := 1/(n + 1)*sqrt(sum(ar2[i]^2, i)) = 0.0213
sr3 := 1/(n + 1)*sqrt(sum(ar3[i]^2, i)) = 0.0141303
sr4 := 1/(n + 1)*sqrt(sum(ar4[i]^2, i)) = 0.0137228
# Графики многочленов
# [plot: y[i], p2(x[i]), p3(x[i]), p4(x[i]) vs i]
# Аппроксимация через regress и interp
a5 := regress(x, y, 5)
a6 := regress(x, y, 6)
p5(t) := interp(a5, x, y, t)
p6(t) := interp(a6, x, y, t)
a8 := regress(x, y, 8)
a7 := regress(x, y, 7)
p8(t) := interp(a8, x, y, t)
p7(t) := interp(a7, x, y, t)
# [plot: y[i], p5(x[i]), p6(x[i]), p7(x[i]), p8(x[i]) vs i]
Погрешность
i := 0 .. n
# 1.) Абсолютная
max(ar4) = 0.0790467
ar5[i] := |y[i] - p5(x[i])|
max(ar5) = 0.0537219
ar6[i] := |y[i] - p6(x[i])|
max(ar6) = 0.0316282
ar7[i] := |y[i] - p7(x[i])|
max(ar7) = 0.0367375
ar8[i] := |y[i] - p8(x[i])|
max(ar8) = 0.0375665
# 2.) Среднеквадратичная
sr4 = 0.0137228
sr5 := 1/(n + 1)*sqrt(sum(ar5[i]^2, i)) = 0.00878682
sr6 := 1/(n + 1)*sqrt(sum(ar6[i]^2, i)) = 0.00574975
sr7 := 1/(n + 1)*sqrt(sum(ar7[i]^2, i)) = 0.00537052
sr8 := 1/(n + 1)*sqrt(sum(ar8[i]^2, i)) = 0.00536121
