f(x) := e^x - 2*(x - 2)^2
a := 0
b := 3
I := integral(f(x), x = a .. b) = 13.0855
# Квадратурная формула правых прямоугольников
k := 1 .. 10
n[k] := 2^k
h[k] := (b - a)/n[k]
integral(f(b), x = a .. b) = 54.2566
J[k] := h[k]*sum(f(a + h[k] + i*h[k]), i = 0 .. n[k] - 1) = [33.1008; 22.8165; 17.8716; 15.458; 14.2666; 13.6748; 13.3798; 13.2326; 13.159; 13.1223]
I = 13.0855
# Оценка погрешности
Z[k] := |I - J[k]|
R[k] := |J[k] - J[k - 1]|/1
I = 13.0855
Z[k] = [20.0153; 9.73093; 4.78605; 2.37249; 1.18107; 0.58924; 0.294295; 0.147067; 0.0735131; 0.0367515]
R[k] = [33.1008; 10.2844; 4.94489; 2.41355; 1.19142; 0.591833; 0.294944; 0.147229; 0.0735536; 0.0367616]
R[k - 1]/R[k] = [0; 3.21856; 2.0798; 2.0488; 2.02578; 2.01311; 2.00659; 2.0033; 2.00165; 2.00083]
# Квадратурная формула Гаусса
m := 5
j := 1 .. m
x[1] := 0.04691008
C[1] := 0.11846344
x[2] := 0.223076534
C[2] := 0.23931433
x[3] := 0.5
C[3] := 0.28444444
x[4] := 0.76923466
C[4] := 0.23931433
x[5] := 0.95308992
C[5] := 0.11846344
C[1] + C[2] + C[3] + C[4] + C[5] = 1
z[j] := a + (b - a)*x[j]
G := (b - a)*sum(C[j]*f(z[j]), j = 1 .. m) = 12.9654
|I - G| = 0.120103
Z[8] = 0.147067
