# Решение задачи Коши для ОДУ 1-го порядка
# Исходное уравнение
# 2sqrt(u)*dx - du
F(t, u) := (1 + u^2)/t
a := π/4
X[0] := 1
b := 3.5
# Разностная схема Эйлера
n := 1000
h := (b - a)/n
k := 0 .. n - 1
t[k] := a + k*h
X[k + 1] := X[k] + h*F(t[k], X[k])  # error: Обнаружена ошибка с плавающей запятой. Это обычно означает, что обнаружено значение больше чем 10^308, либо значение функции вычисляется в точке, в которой функция не определена.
# [plot: X[k] vs t[k]]
# Оценка погрешности методом Рунге
n := 2*n
h := (b - a)/n
k := 0 .. n - 1
t[k] := a + k*h
Y[0] := 1
Y[k + 1] := Y[k] + h*F(t[k], Y[k])  # error: Обнаружена ошибка с плавающей запятой. Это обычно означает, что обнаружено значение больше чем 10^308, либо значение функции вычисляется в точке, в которой функция не определена.
