# Краевая задача для ОДУ 2-го порядка
p(x) := e^(-x) + 1
q(x) := 0.4*sqrt(x + 1)
f(x) := x^2 - cos(x)
aa := 0
bb := 1.5
φ[1] := 1
φ[2] := 1
# Параметры разностной схемы
n := 500
i := 0 .. n
h := (bb - aa)/n
x[i] := aa + i*h
i := 1 .. n - 1
b[i] := 1
a[i] := 1 - p(x[i])*h
c[i] := 2 - p(x[i])*h + q(x[i])*h^2
g[i] := -f(x)
# Решающий блок
Given(∂^2/∂t^2(w(t)))
w := Odesolve(t, bb)  # error: Эта переменная не определена. Проверьте правильность установки обозначения.
