# график и приближенное решение с помощью root
# нам нужен положительный корень.
a := -4 + 10^-10
b := 4
x := a, a + 10^-3 .. b
f(x) := e^(-x) - (x - 1)^2
f(0) = 0
# [plot: f(x) vs x]
# [plot: f(x) vs x]
t := 1
t := root(f(t), t)
t = 1.47767
# приближенное решение методом Ньютона
d(x) := f'(x) → -e^(-x) + (2 - 2*x)
i := 1 .. 5
ε[i] := 10^(-i)
r := 2
new(r, p) :=
    x1 ← r
    x0 ← r + 2*p
    while |x0 - x1| > p
        x0 ← x1
        x1 ← x0 - f(x0)/d(x0)
    x1
new(r, ε[i]) = [1.47773; 1.47773; 1.47767; 1.47767; 1.47767]
new(r, 10^-6) = 1.47767
new(r, 10^-7) = 1.47767
# ...
# new(r, ε[6]) и далее равны new(r, ε[5]) при точности 10^-14.
new(r, 10^-10) = 1.47767
# определение сходимости метода
# достаточные условия сходимости метода Ньютона — сохранение знака  на промежутке, содержащем корень, и выбор начального приближения с той стороны от корня, где знак функции совпадает со знаком второй производной.
dd(x) := f''(x) → e^(-x) - 2
y := -3, -2.9 .. 3
# [plot: dd(y) vs y]
# [plot: f(y) vs y]
# разность приближенных решений и оценка погрешности
t = 1.47767
Δ[i] := |t - new(r, ε[i])| = [5.78997e-5; 5.78997e-5; 1.78115e-9; 1.78115e-9; 7.2813e-10]  # — абсолютная погрешность
δ[i] := |t - new(r, ε[i])|/t = [3.91831e-5; 3.91831e-5; 1.20538e-9; 1.20538e-9; 4.92755e-10]  # — относительная погрешность
# [chart]
    X[1] := i
    X[2] := i
    Y[1] := Δ[i]
    Y[2] := δ[i]
