# решение с помощью lsolve
D := [
    1.342, 0.432, -0.599, 0.202;
    0.202, 1.342, 0.432, -0.599;
    -0.599, 0.202, 1.342, 0.432;
    0.432, -0.599, 0.202, 1.342
]
C := [0.02, 0, 0, 0; 0, 0.02, 0, 0; 0, 0, 0.02, 0; 0, 0, 0, 0.02]
A := D + 4*C
A = [
    1.422, 0.432, -0.599, 0.202;
    0.202, 1.422, 0.432, -0.599;
    -0.599, 0.202, 1.422, 0.432;
    0.432, -0.599, 0.202, 1.422
]
B := [1.941; -0.230; -1.941; 0.230]
x := lsolve(A, B) = [0.960922; -0.0044473; -0.960922; 0.0044473]
# решение методом Зейделя
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zeidel(C, d, ε) :=
    a ← rows(d) - 1
    for i ∈ 0 .. a
        for j ∈ 0 .. a
            if i ≠ j
                A[i, j] ← C[i, j]/C[i, i]
            else
                A[i, j] ← 0
            b[i] ← d[i]/C[i, i]
    X ← d
    M[:, 0] ← X
    k ← 1
    while 1 > 0
        for i ∈ 0 .. a
            X[i] ← b[i] - sum(A[i, j]*X[j], j = 0 .. a)
        M[:, k] ← X
        if max(|M[:, k] - M[:, k - 1]|) < ε
            break
        k ← k + 1
    M
a := zeidel(A, B, 10^-10)[:, cols(zeidel(A, B, 10^-10)) - 1]
a = [0.960922; -0.0044473; -0.960922; 0.0044473]
x = [0.960922; -0.0044473; -0.960922; 0.0044473]
# погрешность
r := zeidel(A, B, 10^-11)
r = [
    1.941, 0.584558, 0.654209, 0.726687, 0.779805, 0.821185, 0.853071, 0.877686, 0.896682, 0.911343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;
    -0.23, 0.441773, 0.272081, 0.216364, 0.165166, 0.126543, 0.0966383, 0.0735689, 0.0557635, 0.0420219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;
    -1.941, -1.25137, -1.23378, -1.16643, -1.12005, -1.08368, -1.05567, -1.03405, -1.01736, -1.00448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;
    0.23, 0.34801, 0.25287, 0.197814, 0.153523, 0.119515, 0.0932525, 0.072985, 0.0573429, 0.0452708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]  # (c от 0 до 93, т. к. в r 93 элемента)
c := 0 .. 93
p[c] := max(|r[:, c] - x|)
# [chart]
    X[1] := c
    Y[1] := p[c]
# определение сходимости
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# метод Зейделя сходится, если матрица A положительная:
# проверим, умножив на любой вектор. получаем положительное число, а значит, метод сходится.
y := [-1; 5; -7; 9]
A*y*y = 88.528
