D := [
    1.342, 0.432, -0.599, 0.202;
    0.432, 1.342, 0.256, -0.599;
    -0.599, 0.256, 1.342, 0.532;
    0.202, -0.599, 0.532, 1.342
]
C := [0.05, 0, 0, 0; 0, 0.03, 0, 0; 0, 0, 0.02, 0; 0, 0, 0, 0.04]
A := D + 4*C
A = [
    1.542, 0.432, -0.599, 0.202;
    0.432, 1.462, 0.256, -0.599;
    -0.599, 0.256, 1.422, 0.532;
    0.202, -0.599, 0.532, 1.502
]
# собственные числа и собственные векторы с помощью eigenvals и eigenvecs
eval := eigenvals(A) = [2.33729; 1.83166; 1.59207; 0.166978]
eve := eigenvecs(A) = [
    0.496346, 0.546065, -0.491282, 0.462704;
    0.462105, -0.493526, -0.546813, -0.493849;
    -0.505591, -0.44922, -0.505608, 0.535667;
    -0.533364, 0.506405, -0.451661, -0.505053
]
# собственное число и собственный вектор степенным методом
n := 158
k := 0 .. n
y[:, 0] := [1; 1; 1; 1]
y[:, k + 1] := A*y[:, k]
λ1 := y[:, n + 1][0]/y[:, n][0]
λ1 = 2.33729
eigenvec(A, λ1) = [-0.496346; -0.462105; 0.505591; 0.533364]
y[:, n + 1] := y[:, n + 1]/|y[:, n + 1]|
A*y[:, n + 1] - λ1*y[:, n + 1] = [0; 0; 0; 0]  # — невязка.
# собственные числа и собственные векторы с помощью метода вращения
φ(i, j, A) :=
    if A[i, i] ≠ A[j, j]
        0.5*atan(2*A[i, j]/(A[i, i] - A[j, j]))
    else
        π/4
c(i, j, A) := cos(φ(i, j, A))
s(i, j, A) := sin(φ(i, j, A))
t(i, j, A) := sum(sum(A[i, j]^2, j = 0 .. 3), i = 0 .. 3) - sum(A[i, i]^2, i = 0 .. 3)
# i, j - номер строки и столбца максимального по модулю элемента матрицы A, расположенного выше главной диагонали.
# итерация 1
V := identity(4)
i := 0
U := identity(4)
j := 2
U[i, i] := c(i, j, A)
U[j, j] := c(i, j, A)
U[i, j] := -s(i, j, A)
U[j, i] := s(i, j, A)
A := transpose(U)*A*U
V := U
t(i, j, A) = 1.86958
A = [
    2.084, 0.14857, 0, -0.207158;
    0.14857, 1.462, 0.479674, -0.599;
    0, 0.479674, 0.880002, 0.530013;
    -0.207158, -0.599, 0.530013, 1.502
]
# итерация 2
i := 1
U := identity(4)
j := 3
U[i, i] := c(i, j, A)
U[j, j] := c(i, j, A)
U[i, j] := -s(i, j, A)
U[j, i] := s(i, j, A)
A := transpose(U)*A*U
V := V*U
t(i, j, A) = 1.15198
A = [
    2.084, -0.0372246, 0, -0.252194;
    -0.0372246, 0.882666, 0.713263, 0;
    0, 0.713263, 0.880002, 0.0475043;
    -0.252194, 0, 0.0475043, 2.08133
]
# итерация 3
i := 1
U := identity(4)
j := 2
U[i, i] := c(i, j, A)
U[j, j] := c(i, j, A)
U[i, j] := -s(i, j, A)
U[j, i] := s(i, j, A)
A := transpose(U)*A*U
V := V*U
t(i, j, A) = 0.134488
A = [
    2.084, -0.0263463, 0.0262972, -0.252194;
    -0.0263463, 1.5946, 0, 0.0335592;
    0.0262972, 0, 0.16807, 0.033622;
    -0.252194, 0.0335592, 0.033622, 2.08133
]
# итерация 4
i := 0
U := identity(4)
j := 3
U[i, i] := c(i, j, A)
U[j, j] := c(i, j, A)
U[i, j] := -s(i, j, A)
U[j, i] := s(i, j, A)
A := transpose(U)*A*U
V := V*U
t(i, j, A) = 0.00728465
A = [
    2.33486, -0.042346, -0.00506753, 0;
    -0.042346, 1.5946, 0, 0.00521215;
    -0.00506753, 0, 0.16807, 0.0423827;
    0, 0.00521215, 0.0423827, 1.83047
]
# итерация 5
i := 0
U := identity(4)
j := 1
U[i, i] := c(i, j, A)
U[j, j] := c(i, j, A)
U[i, j] := -s(i, j, A)
U[j, i] := s(i, j, A)
A := transpose(U)*A*U
V := V*U
t(i, j, A) = 0.00369829
A = [
    2.33728, 0, -0.00505931, -0.000296704;
    0, 1.59218, -0.000288471, 0.0052037;
    -0.00505931, -0.000288471, 0.16807, 0.0423827;
    -0.000296704, 0.0052037, 0.0423827, 1.83047
]
# итерация 6
i := 2
U := identity(4)
j := 3
U[i, i] := c(i, j, A)
U[j, j] := c(i, j, A)
U[i, j] := -s(i, j, A)
U[j, i] := s(i, j, A)
A := transpose(U)*A*U
V := V*U
t(i, j, A) = 0.000105693
A = [
    2.33728, 0, -0.00505011, -0.000425469;
    0, 1.59218, -0.000420917, 0.00519466;
    -0.00505011, -0.000420917, 0.16699, 0;
    -0.000425469, 0.00519466, 0, 1.83155
]
# итерация 7
i := 0
U := identity(4)
j := 2
U[i, i] := c(i, j, A)
U[j, j] := c(i, j, A)
U[i, j] := -s(i, j, A)
U[j, i] := s(i, j, A)
A := transpose(U)*A*U
V := V*U
t(i, j, A) = 5.46854e-5
A = [
    2.33729, 9.79437e-7, 0, -0.000425468;
    9.79437e-7, 1.59218, -0.000420916, 0.00519466;
    0, -0.000420916, 0.166979, -9.9003e-7;
    -0.000425468, 0.00519466, -9.9003e-7, 1.83155
]
# итерация 8
i := 1
U := identity(4)
j := 3
U[i, i] := c(i, j, A)
U[j, j] := c(i, j, A)
U[i, j] := -s(i, j, A)
U[j, i] := s(i, j, A)
A := transpose(U)*A*U
V := V*U
t(i, j, A) = 7.1639e-7
A = [
    2.33729, 1.02062e-5, 0, -0.000425347;
    1.02062e-5, 1.59207, -0.000420795, 0;
    0, -0.000420795, 0.166979, -1.0118e-5;
    -0.000425347, 0, -1.0118e-5, 1.83166
]
# итерация 9
i := 1
U := identity(4)
j := 2
U[i, i] := c(i, j, A)
U[j, j] := c(i, j, A)
U[i, j] := -s(i, j, A)
U[j, i] := s(i, j, A)
A := transpose(U)*A*U
V := V*U
t(i, j, A) = 3.62253e-7
A = [
    2.33729, 1.02062e-5, 3.01363e-9, -0.000425347;
    1.02062e-5, 1.59207, 0, 2.9876e-9;
    3.01363e-9, 0, 0.166978, -1.0118e-5;
    -0.000425347, 2.9876e-9, -1.0118e-5, 1.83166
]
# итерация 10
i := 0
U := identity(4)
j := 3
U[i, i] := c(i, j, A)
U[j, j] := c(i, j, A)
U[i, j] := -s(i, j, A)
U[j, i] := s(i, j, A)
A := transpose(U)*A*U
V := V*U
t(i, j, A) = 4.13079e-10
A = [
    2.33729, 1.02062e-5, 1.15251e-8, 0;
    1.02062e-5, 1.59207, 0, 1.15733e-8;
    1.15251e-8, 0, 0.166978, -1.0118e-5;
    0, 1.15733e-8, -1.0118e-5, 1.83166
]
vals := [A[0, 0]; A[3, 3]; A[1, 1]; A[2, 2]]
V = [
    0.496339, 0.491289, 0.462701, 0.546068;
    0.462097, 0.546819, -0.493846, -0.493529;
    -0.505598, 0.505601, 0.53567, -0.449217;
    -0.53337, 0.451654, -0.505056, 0.506402
]
# сравнение приближенных значений собственных чисел
l := 0 .. 3
vals = [2.33729; 1.83166; 1.59207; 0.166978]
Δ[l, :] := |vals[l, :] - eval[l, :]|
eval = [2.33729; 1.83166; 1.59207; 0.166978]
Δ = [1.39778e-10; 6.1499e-11; 1.39781e-10; 6.14978e-11]
# сравнение приближенных значений собственных векторов
M[l, 0] := |eve[l, 0] - V[l, 0]| = [6.73088e-6; 7.48631e-6; 6.92737e-6; 6.183e-6]
M[l, 2] := |eve[l, 2] + V[l, 1]| = [6.82406e-6; 6.30488e-6; 6.94609e-6; 7.28028e-6]
M[l, 1] := |eve[l, 1] - V[l, 3]| = [2.7886e-6; 3.02804e-6; 3.23139e-6; 3.09156e-6]
M[l, 3] := |eve[l, 3] - V[l, 2]| = [3.31638e-6; 3.00214e-6; 2.72769e-6; 3.08078e-6]
