# функция
f(x) := e^(-x) - (x - 1)^2
a := -3
b := 3
# 1. интерполяционный многочлен Лагранжа
# точки для вычисления погрешности:
g := 137
j := 0 .. g
t[j] := a + (b - a)/g*j
n := [5; 10; 15; 20; 25; 30; 40; 50; 60]
# 1.1 равноотстоящие узлы
N := n[0]
i := 0 .. N
x[i] := a + (b - a)/N*i
L(t) := sum(f(x[j])*product(if(j - i, (t - x[i])/(x[j] - x[i]), 1), i = 0 .. N), j = 0 .. N)
# [plot: f(t[j]), L(t[j]) vs t[j]]
# [plot: f(t[j]) - L(t[j]) vs t[j]]
# вычисление погрешности интерполяции
s[j] := |f(t[j]) - L(t[j])|
r[0] := max(s)
N := n[1]
i := 0 .. N
x[i] := a + (b - a)/N*i
L(t) := sum(f(x[j])*product(if(j - i, (t - x[i])/(x[j] - x[i]), 1), i = 0 .. N), j = 0 .. N)
s[j] := |f(t[j]) - L(t[j])|
r[1] := max(s)
N := n[2]
i := 0 .. N
x[i] := a + (b - a)/N*i
L(t) := sum(f(x[j])*product(if(j - i, (t - x[i])/(x[j] - x[i]), 1), i = 0 .. N), j = 0 .. N)
s[j] := |f(t[j]) - L(t[j])|
r[2] := max(s)
N := n[3]
i := 0 .. N
x[i] := a + (b - a)/N*i
L(t) := sum(f(x[j])*product(if(j - i, (t - x[i])/(x[j] - x[i]), 1), i = 0 .. N), j = 0 .. N)
s[j] := |f(t[j]) - L(t[j])|
r[3] := max(s)
N := n[4]
i := 0 .. N
x[i] := a + (b - a)/N*i
L(t) := sum(f(x[j])*product(if(j - i, (t - x[i])/(x[j] - x[i]), 1), i = 0 .. N), j = 0 .. N)
s[j] := |f(t[j]) - L(t[j])|
r[4] := max(s)
N := n[5]
i := 0 .. N
x[i] := a + (b - a)/N*i
L(t) := sum(f(x[j])*product(if(j - i, (t - x[i])/(x[j] - x[i]), 1), i = 0 .. N), j = 0 .. N)
s[j] := |f(t[j]) - L(t[j])|
r[5] := max(s)
N := n[6]
i := 0 .. N
x[i] := a + (b - a)/N*i
L(t) := sum(f(x[j])*product(if(j - i, (t - x[i])/(x[j] - x[i]), 1), i = 0 .. N), j = 0 .. N)
s[j] := |f(t[j]) - L(t[j])|
r[6] := max(s)
N := n[7]
i := 0 .. N
x[i] := a + (b - a)/N*i
L(t) := sum(f(x[j])*product(if(j - i, (t - x[i])/(x[j] - x[i]), 1), i = 0 .. N), j = 0 .. N)
s[j] := |f(t[j]) - L(t[j])|
r[7] := max(s)
N := n[8]
i := 0 .. N
x[i] := a + (b - a)/N*i
L(t) := sum(f(x[j])*product(if(j - i, (t - x[i])/(x[j] - x[i]), 1), i = 0 .. N), j = 0 .. N)
s[j] := |f(t[j]) - L(t[j])|
r[8] := max(s)
# 1.2 Чебышевские узлы
N := n[0]
i := 0 .. N
v[i] := cos(π*(1 + 2*i)/(2*(N + 1)))
z[i] := (a + b)/2 + (b - a)/2*v[i]
Lch(t) := sum(f(z[j])*product(if(j - i, (t - z[i])/(z[j] - z[i]), 1), i = 0 .. N), j = 0 .. N)
# [plot: f(t[j]) - Lch(t[j]) vs t[j]]
# вычисление погрешности
s[j] := |f(t[j]) - Lch(t[j])|
rch[0] := max(s)
N := n[1]
i := 0 .. N
v[i] := cos(π*(1 + 2*i)/(2*(N + 1)))
z[i] := (a + b)/2 + (b - a)/2*v[i]
Lch(t) := sum(f(z[j])*product(if(j - i, (t - z[i])/(z[j] - z[i]), 1), i = 0 .. N), j = 0 .. N)
s[j] := |f(t[j]) - Lch(t[j])|
rch[1] := max(s)
N := n[2]
i := 0 .. N
v[i] := cos(π*(1 + 2*i)/(2*(N + 1)))
z[i] := (a + b)/2 + (b - a)/2*v[i]
Lch(t) := sum(f(z[j])*product(if(j - i, (t - z[i])/(z[j] - z[i]), 1), i = 0 .. N), j = 0 .. N)
s[j] := |f(t[j]) - Lch(t[j])|
rch[2] := max(s)
N := n[3]
i := 0 .. N
v[i] := cos(π*(1 + 2*i)/(2*(N + 1)))
z[i] := (a + b)/2 + (b - a)/2*v[i]
Lch(t) := sum(f(z[j])*product(if(j - i, (t - z[i])/(z[j] - z[i]), 1), i = 0 .. N), j = 0 .. N)
s[j] := |f(t[j]) - Lch(t[j])|
rch[3] := max(s)
N := n[4]
i := 0 .. N
v[i] := cos(π*(1 + 2*i)/(2*(N + 1)))
z[i] := (a + b)/2 + (b - a)/2*v[i]
Lch(t) := sum(f(z[j])*product(if(j - i, (t - z[i])/(z[j] - z[i]), 1), i = 0 .. N), j = 0 .. N)
s[j] := |f(t[j]) - Lch(t[j])|
rch[4] := max(s)
N := n[5]
i := 0 .. N
v[i] := cos(π*(1 + 2*i)/(2*(N + 1)))
z[i] := (a + b)/2 + (b - a)/2*v[i]
Lch(t) := sum(f(z[j])*product(if(j - i, (t - z[i])/(z[j] - z[i]), 1), i = 0 .. N), j = 0 .. N)
s[j] := |f(t[j]) - Lch(t[j])|
rch[5] := max(s)
N := n[6]
i := 0 .. N
v[i] := cos(π*(1 + 2*i)/(2*(N + 1)))
z[i] := (a + b)/2 + (b - a)/2*v[i]
Lch(t) := sum(f(z[j])*product(if(j - i, (t - z[i])/(z[j] - z[i]), 1), i = 0 .. N), j = 0 .. N)
s[j] := |f(t[j]) - Lch(t[j])|
rch[6] := max(s)
N := n[7]
i := 0 .. N
v[i] := cos(π*(1 + 2*i)/(2*(N + 1)))
z[i] := (a + b)/2 + (b - a)/2*v[i]
Lch(t) := sum(f(z[j])*product(if(j - i, (t - z[i])/(z[j] - z[i]), 1), i = 0 .. N), j = 0 .. N)
s[j] := |f(t[j]) - Lch(t[j])|
rch[7] := max(s)
N := n[8]
i := 0 .. N
v[i] := cos(π*(1 + 2*i)/(2*(N + 1)))
z[i] := (a + b)/2 + (b - a)/2*v[i]
Lch(t) := sum(f(z[j])*product(if(j - i, (t - z[i])/(z[j] - z[i]), 1), i = 0 .. N), j = 0 .. N)
s[j] := |f(t[j]) - Lch(t[j])|
rch[8] := max(s)
# график погрешностей
m := 0 .. 3
# [chart]
    X[1] := n[m]
    Y[1] := r[m]
    X[2] := n[m]
    Y[2] := rch[m]
m := 0 .. 8
# [chart]
    X[1] := n[m]
    Y[1] := r[m]
    X[2] := n[m]
    Y[2] := rch[m]
# 2. линейный интерполяционный сплайн
N := n[0]
i := 0 .. N
p[i] := a + (b - a)/N*i
y[i] := f(p[i])
Ls(t) := linterp(p, y, t)
# [plot: f(t[j]), Ls(t[j]) vs t[j]]
# [plot: f(t[j]) - Ls(t[j]) vs t[j]]
# считаем погрешности
s[j] := |f(t[j]) - Ls(t[j])|
rs[0] := max(s)
N := n[1]
i := 0 .. N
p[i] := a + (b - a)/N*i
y[i] := f(p[i])
Ls(t) := linterp(p, y, t)
s[j] := |f(t[j]) - Ls(t[j])|
rs[1] := max(s)
N := n[2]
i := 0 .. N
p[i] := a + (b - a)/N*i
y[i] := f(p[i])
Ls(t) := linterp(p, y, t)
s[j] := |f(t[j]) - Ls(t[j])|
rs[2] := max(s)
N := n[3]
i := 0 .. N
p[i] := a + (b - a)/N*i
y[i] := f(p[i])
Ls(t) := linterp(p, y, t)
s[j] := |f(t[j]) - Ls(t[j])|
rs[3] := max(s)
N := n[4]
i := 0 .. N
p[i] := a + (b - a)/N*i
y[i] := f(p[i])
Ls(t) := linterp(p, y, t)
s[j] := |f(t[j]) - Ls(t[j])|
rs[4] := max(s)
N := n[5]
i := 0 .. N
p[i] := a + (b - a)/N*i
y[i] := f(p[i])
Ls(t) := linterp(p, y, t)
s[j] := |f(t[j]) - Ls(t[j])|
rs[5] := max(s)
N := n[6]
i := 0 .. N
p[i] := a + (b - a)/N*i
y[i] := f(p[i])
Ls(t) := linterp(p, y, t)
s[j] := |f(t[j]) - Ls(t[j])|
rs[6] := max(s)
N := n[7]
i := 0 .. N
p[i] := a + (b - a)/N*i
y[i] := f(p[i])
Ls(t) := linterp(p, y, t)
s[j] := |f(t[j]) - Ls(t[j])|
rs[7] := max(s)
N := n[8]
i := 0 .. N
p[i] := a + (b - a)/N*i
y[i] := f(p[i])
Ls(t) := linterp(p, y, t)
s[j] := |f(t[j]) - Ls(t[j])|
rs[8] := max(s)
# [chart]
    X[1] := n[m]
    Y[1] := rs[m]
