# таблично заданная функция
x := [0.25; 0.31; 0.36; 0.39; 0.43; 0.47; 0.52; 0.56; 0.64; 0.66; 0.71]
y := [0.552; 0.615; 0.667; 0.740; 0.742; 0.687; 0.643; 0.589; 0.584; 0.559; 0.521]
# реализация метода наименьших квадратов
n := 10
s(j) := sum(x[i]^j, i = 0 .. n)
b(j) := sum(y[i]*x[i]^j, i = 0 .. n)
A2 := [s(0), s(1), s(2); s(1), s(2), s(3); s(2), s(3), s(4)]
B2 := [b(0); b(1); b(2)]
a2 := lsolve(A2, B2) = [0.0966739; 2.64158; -2.9376]
p2(t) := sum(a2[k]*t^k, k = 0 .. 2)
A3 := [s(0), s(1), s(2), s(3); s(1), s(2), s(3), s(4); s(2), s(3), s(4), s(5); s(3), s(4), s(5), s(6)]
B3 := [b(0); b(1); b(2); b(3)]
a3 := lsolve(A3, B3) = [-0.885178; 9.61106; -18.4024; 10.8085]
p3(t) := sum(a3[k]*t^k, k = 0 .. 3)
A4 := [
    s(0), s(1), s(2), s(3), s(4);
    s(1), s(2), s(3), s(4), s(5);
    s(2), s(3), s(4), s(5), s(6);
    s(3), s(4), s(5), s(6), s(7);
    s(4), s(5), s(6), s(7), s(8)
]
B4 := [b(0); b(1); b(2); b(3); b(4)]
a4 := lsolve(A4, B4) = [-0.4047; 5.03303; -2.82443; -11.7349; 11.766]
p4(t) := sum(a4[k]*t^k, k = 0 .. 4)
a4 = [-0.4047; 5.03303; -2.82443; -11.7349; 11.766]
# погрешность
i := 0 .. n
Δ2[i] := |y[i] - p2(x[i])|
max(Δ2) = 0.0657251
δ2 := 1/(n + 1)*sqrt(sum(Δ2[i]^2, i)) = 0.0105415
Δ3[i] := |y[i] - p3(x[i])|
max(Δ3) = 0.0376766
δ3 := 1/(n + 1)*sqrt(sum(Δ3[i]^2, i)) = 0.00748603
Δ4[i] := |y[i] - p4(x[i])|
max(Δ4) = 0.0354905
δ4 := 1/(n + 1)*sqrt(sum(Δ4[i]^2, i)) = 0.00742063
# график
# [plot: y, p2(x), p3(x), p4(x) vs x]
# методы regress и interp
a5 := regress(x, y, 5)
p5(t) := interp(a5, x, y, t)
a6 := regress(x, y, 6)
p6(t) := interp(a6, x, y, t)
a7 := regress(x, y, 7)
p7(t) := interp(a7, x, y, t)
a8 := regress(x, y, 8)
p8(t) := interp(a8, x, y, t)
# график
# [plot: y[i], p5(x[i]), p6(x[i]) vs x[i]]
# [plot: y[i], p7(x[i]), p8(x[i]) vs x[i]]
# погрешность
Δ5[i] := |y[i] - p5(x[i])|
max(Δ5) = 0.0260532
δ5 := 1/(n + 1)*sqrt(sum(Δ5[i]^2, i)) = 0.00372506
Δ6[i] := |y[i] - p6(x[i])|
max(Δ6) = 0.0249478
δ6 := 1/(n + 1)*sqrt(sum(Δ6[i]^2, i)) = 0.00371548
Δ7[i] := |y[i] - p7(x[i])|
max(Δ7) = 0.015782
δ7 := 1/(n + 1)*sqrt(sum(Δ7[i]^2, i)) = 0.00282382
Δ8[i] := |y[i] - p8(x[i])|
max(Δ8) = 0.0170217
δ8 := 1/(n + 1)*sqrt(sum(Δ8[i]^2, i)) = 0.00261838
# [plot: y[i], p2(x[i]), p5(x[i]), p8(x[i]) vs x[i]]
