# 4 вариант, формула параболы, 4 узла
f(x) := e^(-x) - (x - 1)^2
a := -3
b := 3
I := integral(f(x), x = a .. b) = -3.96425
# квадратурная формула Симпсона (парабол)
k := 1 .. 10
n[k] := 2^k
h[k] := (b - a)/n[k]
J[k] := h[k]/3*(f(a) + f(b) + 2*sum(f(a + 2*j*h[k]), j = 1 .. n[k]/2 - 1) + 4*sum(f(a + (2*j - 1)*h[k]), j = 1 .. n[k]/2))
D[k] := |I - J[k]|
# оценка погрешности по методу Рунге
k := 1 .. 10
R[k] := |J[k] - J[k - 1]|/(2^4 - 1)
J = [0; 0.405972; -3.5227; -3.93126; -3.96209; -3.96411; -3.96424; -3.96425; -3.96425; -3.96425; -3.96425]
D[k] = [4.37022; 0.441551; 0.0329924; 0.00216488; 0.000137001; 8.58942e-6; 5.3726e-7; 3.35853e-8; 2.09919e-9; 1.31199e-10]
R[k] = [0.0270648; 0.261911; 0.0272372; 0.00205517; 0.000135192; 8.56077e-6; 5.36811e-7; 3.35783e-8; 2.09908e-9; 1.31199e-10]
R[k - 1]/R[k] = [0; 0.103336; 9.61594; 13.253; 15.2019; 15.792; 15.9475; 15.9868; 15.9967; 15.9992]
# квадратурная формула Гаусса
m := 4
j := 1 .. m
x[1] := 0.06943184
x[3] := 0.66999052
c[1] := 0.17392742
c[3] := 0.32607258
x[2] := 0.33000948
x[4] := 0.93056815
c[2] := 0.32607258
c[4] := 0.17392742
z[j] := a + (b - a)*x[j]
G := (b - a)*sum(c[j]*f(z[j]), j = 1 .. m) = -3.97131
|I - G| = 0.00706113
